// COMSOL Multiphysics 5.2.0.166 model "Thesis piece.mph"
// Outline of the model tree

Variables
  var1 "Variables 1"
    ue = 2 * 10^-4  // Air Ion Mobility

Geometry
  geom1 "Geometry 1" (2D axisymmetric, length unit m)
    r1: Rectangle | pos = {0, 0}; type = solid; base = corner; size = {0.009, 2.5}
    fin: Finalize "Form Union"

Physics
  c: CoefficientFormPDE on all domains
    dependent variable Pv
    cfeq1: CoefficientFormPDE (default) | c = {ue, 0, 0, ue}; f = 0; da = 0; be = {-D, 0}
    zflx1: ZeroFluxBoundary "Zero Flux 1" (default)
    init1: init "Initial Values 1" (default) | u = 1044E-03
    dir1: DirichletBoundary "Dirichlet Boundary Condition 1" on boundaries 4 | r = 0
  es: Electrostatics on all domains
    dependent variable V
    EquationForm.form = Automatic
    EquationForm.freq_src = userdef
    EquationForm.freq = 1[kHz]
    ccn1: ChargeConservation (default)
    axi1: AxialSymmetry (default)
    zc1: ZeroCharge (default)
    init1: init "Initial Values 1" (default)
  spf: TurbulentFlowkeps "Turbulent Flow, k-ε" on all domains
    dependent variable u2 = {u2, v2, w2}
    EquationForm.form = Stationary
    fp1: FluidProperties (default)
    init1: init "Initial Values 1" (default)
    axi1: AxialSymmetry (default)
    wall1: Wall (default)

Mesh
  mesh1 "Mesh 1" (physics-controlled)
    size: MeshSizeDefault | hauto = 5

Studies
  std1 "Study 1"
    stat: Stationary